*Heading
** Job name: harmonic_analysis Model name: Static+Model with NLGEOM
** Generated by: Abaqus/CAE Learning Edition 2023
*Preprint, echo=NO, model=NO, history=NO, contact=NO
**
** PARTS
**
*Part, name=PART-1
*Node
      1,   -3.0480001,   -3.0480001,    3.0480001
      2,   -3.0480001,    3.0480001,    3.0480001
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*Element, type=S4
  1,   1,  49, 473,  84
  2,  49,  50, 474, 473
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*Element, type=B31
601,   1,  49
602,  49,  50
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*Nset, nset=WIRE-1-SET-1
   1,   2,   3,   4,   5,   6
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*Elset, elset=WIRE-1-SET-1, generate
 801,  880,    1
*Nset, nset=WIRE-2-SET-1
   1,   2,   3,   4,   5,   6
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*Elset, elset=WIRE-2-SET-1, generate
 641,  800,    1
*Nset, nset=WIRE-3-SET-1
   1,   2,   5,   6,   9,  10
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*Elset, elset=WIRE-3-SET-1, generate
 601,  640,    1
*Nset, nset=SLAB
   1,   2,   3,   4,   5,   6
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*Elset, elset=SLAB, generate
   1,  600,    1
*Nset, nset=COLUMN
   1,   2,   3,   4,   5,   6
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*Elset, elset=COLUMN, generate
 801,  880,    1
*Nset, nset=BEAM
   1,   2,   3,   4,   5,   6
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*Elset, elset=BEAM, generate
 601,  800,    1
*Elset, elset=_I2, internal
 601, 602, 603, 604, 605, 606
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*Elset, elset=_I3, internal
 651, 652, 653, 654, 655, 656
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** Section: Section-1-SLAB
*Shell Section, elset=SLAB, material=CONCRETE
0.127, 5
** Section: Section-2-_I2  Profile: Profile-1
*Beam Section, elset=_I2, material=STEEL, temperature=GRADIENTS, section=I
0.205, 0.41, 0.18, 0.18, 0.016, 0.016, 0.0097
1.,0.,0.
** Section: Section-3-_I3  Profile: Profile-2
*Beam Section, elset=_I3, material=STEEL, temperature=GRADIENTS, section=I
0.205, 0.41, 0.18, 0.18, 0.016, 0.016, 0.0097
0.,1.,0.
** Section: Section-4-COLUMN  Profile: Profile-3
*Beam Section, elset=COLUMN, material=STEEL, temperature=GRADIENTS, section=I
0.205, 0.41, 0.18, 0.18, 0.016, 0.016, 0.0097
1.,0.,0.
*End Part
**
**
** ASSEMBLY
**
*Assembly, name=Assembly
**
*Instance, name=PART-1-1, part=PART-1
*End Instance
**
*Nset, nset=BC_fixed, instance=PART-1-1, generate
 41,  48,   1
*Nset, nset="harmonic response node", instance=PART-1-1
 748,
*Elset, elset="_Harmonis Load surface_SPOS", internal, instance=PART-1-1, generate
 301,  400,    1
*Surface, type=ELEMENT, name="Harmonis Load surface"
"_Harmonis Load surface_SPOS", SPOS
*Elset, elset="_Live_load Surface_SPOS", internal, instance=PART-1-1, generate
   1,  600,    1
*Surface, type=ELEMENT, name="Live_load Surface"
"_Live_load Surface_SPOS", SPOS
*End Assembly
**
** MATERIALS
**
*Material, name=CONCRETE
*Density
2300.,
*Elastic
 3e+10, 0.18
*Material, name=STEEL
*Density
7850.,
*Elastic
 2e+11, 0.3
**
** BOUNDARY CONDITIONS
**
** Name: column_fixed Type: Symmetry/Antisymmetry/Encastre
*Boundary
BC_fixed, ENCASTRE
** ----------------------------------------------------------------
**
** STEP: Live_Dead_Earthquake_Loads
**
*Step, name=Live_Dead_Earthquake_Loads, nlgeom=YES
*Static
1., 1., 1e-05, 1.
**
** LOADS
**
** Name: Dead_load   Type: Gravity
*Dload, op=NEW
, GRAV, 9.81, 0., 0., -1.
** Name: Earthquake_Load   Type: Gravity
*Dload, op=NEW
, GRAV, 1.962, 0., 1., 0.
** Name: live_load   Type: Pressure
*Dsload
"Live_load Surface", P, 2394.01
**
** OUTPUT REQUESTS
**
*Restart, write, frequency=0
**
** FIELD OUTPUT: F-Output-1
**
*NODE PRINT ,NSET = BC_FIXED, TOTALS=YES, SUMMARY=YES
RF
*Output, field
*Node Output
CF, RF, U
*Element Output, directions=YES
S,
**
** HISTORY OUTPUT: H-Output-1
**
*Output, history
*Node Output, nset=BC_fixed
RF1, RF2, RF3, RM1, RM2, RM3
*End Step
** ----------------------------------------------------------------
**
** STEP: Modal Analysis
**
*Step, name="Modal Analysis", nlgeom=NO, perturbation
*Frequency, eigensolver=Lanczos, sim, acoustic coupling=on, normalization=mass
50, , , , ,
**
** OUTPUT REQUESTS
**
*Restart, write, frequency=0
**
** FIELD OUTPUT: F-Output-2
**
*Output, field
*Node Output
U,
**
** HISTORY OUTPUT: H-Output-2
**
*Output, history
*Energy Output
ALLKE, ALLSE
*End Step
** ----------------------------------------------------------------
**
** STEP: Harmonic Analysis
**
*Step, name="Harmonic Analysis", nlgeom=NO, perturbation
*Steady State Dynamics
0., 25., 20, 3.
*Modal Damping
1, 500, 0.02
**
** LOADS
**
** Name: pressure_1pa   Type: Pressure
*Dsload, real
"Harmonis Load surface", P, 1.
**
** OUTPUT REQUESTS
**
**
** FIELD OUTPUT: F-Output-3
**
*Output, field
*Node Output
U,
**
** HISTORY OUTPUT: H-Output-3
**
*Output, history
*Node Output, nset="harmonic response node"
U1, U2, U3, UR1, UR2, UR3
*End Step
